# OpenSim document version 30000
Model XSensStyleModel:
  length_units: meters
  force_units: N
  gravity: 0 0 -9.80665
  BodySet:
    Body ground: mass=0 mass_center=(0 0 0) inertia_xx=0 inertia_yy=0 inertia_zz=0
    Body Pelvis: mass=4.9652 mass_center=(0 0 0.048589) inertia_xx=0.027604 inertia_yy=0.011288 inertia_zz=0.031195
        meshes=box.vtp
      CustomJoint jGroundBase: parent_body=ground location_in_parent=(0 0 0) location=(0 0 -0.0493)
        Coordinate jGroundBase_rz: motion_type=rotational default_value=0 initial_value=0 range=(-3.14 3.14)
            clamped=true
        Coordinate jGroundBase_rx: motion_type=rotational default_value=0 initial_value=0 range=(-3.14 3.14)
            clamped=true
        Coordinate jGroundBase_ry: motion_type=rotational default_value=0 initial_value=0 range=(-3.14 3.14)
            clamped=true
        Coordinate jGroundBase_tx: motion_type=translational default_value=0 initial_value=0 range=(-Inf Inf)
            clamped=true
        Coordinate jGroundBase_ty: motion_type=translational default_value=0 initial_value=0 range=(-Inf Inf)
            clamped=true
        Coordinate jGroundBase_tz: motion_type=translational default_value=0 initial_value=0 range=(-Inf Inf)
            clamped=true
        SpatialTransform:
          TransformAxis rotation1: coordinates=jGroundBase_rz axis=(0 0 1) LinearFunction(coefficients=1 0)
          TransformAxis rotation2: coordinates=jGroundBase_rx axis=(1 0 0) LinearFunction(coefficients=1 0)
          TransformAxis rotation3: coordinates=jGroundBase_ry axis=(0 1 0) LinearFunction(coefficients=1 0)
          TransformAxis translation1: coordinates=jGroundBase_tx axis=(1 0 0) LinearFunction(coefficients=1 0)
          TransformAxis translation2: coordinates=jGroundBase_ty axis=(0 1 0) LinearFunction(coefficients=1 0)
          TransformAxis translation3: coordinates=jGroundBase_tz axis=(0 0 1) LinearFunction(coefficients=1 0)
    # Chain from (2) to (7)
    Body L5_f1: mass=0 meshes=cylinder.vtp
      CustomJoint jL5S1_rotx: parent_body=Pelvis location_in_parent=(-7.5e-5 0 0.09681) location=(0 0 0)
        Coordinate jL5S1_rotx: motion_type=rotational default_value=0 range=(-1.570796 1.570796) clamped=false
        SpatialTransform:
          TransformAxis rotation1: coordinates=jL5S1_rotx axis=(1 0 0) LinearFunction(coefficients=1 0)
          # 3 Axes for translations are listed next.
    Body L5_f2: mass=0 meshes=cylinder.vtp
      CustomJoint jL5S1_roty: parent_body=L5_f1 location_in_parent=(0 0 0) location=(0 0 0)
        Coordinate jL5S1_roty: motion_type=rotational default_value=0 range=(-1.570796 1.570796) clamped=false
        SpatialTransform:
          TransformAxis rotation2: coordinates=jL5S1_roty axis=(0 1 0) LinearFunction(coefficients=1 0)
          # 3 Axes for translations are listed next.
    Body L5: mass=6.3306 mass_center=(0 0 0.050322) inertia_xx=0.045068 inertia_yy=0.033801 inertia_zz=0.067244
        meshes=cylinder.vtp
      CustomJoint jL5S1_rotz: parent_body=L5_f2 location_in_parent=(0 0 0) location=(0 0 0)
        Coordinate jL5S1_rotz: motion_type=rotational default_value=0 range=(-1.570796 1.570796) clamped=false
        SpatialTransform:
          TransformAxis rotation3: coordinates=jL5S1_rotz axis=(0 0 1) LinearFunction(coefficients=1 0)
          # 3 Axes for translations are listed next.
    Body L3_f1: mass=0 meshes=cylinder.vtp
      CustomJoint jL4L3_rotx: parent_body=L5 location_in_parent=(0.000136 0 0.10065) location=(0 0 0)
        Coordinate jL4L3_rotx: motion_type=rotational default_value=0 range=(-1.570796 1.570796) clamped=false
        SpatialTransform:
          TransformAxis rotation1: coordinates=jL4L3_rotx axis=(1 0 0) LinearFunction(coefficients=1 0)
          # 3 Axes for translations are listed next.
    Body L3_f2: mass=0 meshes=cylinder.vtp
      CustomJoint jL4L3_roty: parent_body=L3_f1 location_in_parent=(0 0 0) location=(0 0 0)
        Coordinate jL4L3_roty: motion_type=rotational default_value=0 range=(-1.570796 1.570796) clamped=false
        SpatialTransform:
          TransformAxis rotation2: coordinates=jL4L3_roty axis=(0 1 0) LinearFunction(coefficients=1 0)
          # 3 Axes for translations are listed next.
    Body L3: mass=6.3306 mass_center=(0 0 0.045465) inertia_xx=0.044087 inertia_yy=0.032819 inertia_zz=0.067244
        meshes=cylinder.vtp
      CustomJoint jL4L3_rotz: parent_body=L3_f2 location_in_parent=(0 0 0) location=(0 0 0)
        Coordinate jL4L3_rotz: motion_type=rotational default_value=0 range=(-1.570796 1.570796) clamped=false
        SpatialTransform:
          TransformAxis rotation3: coordinates=jL4L3_rotz axis=(0 0 1) LinearFunction(coefficients=1 0)
          # 3 Axes for translations are listed next.
    Body T12_f1: mass=0 meshes=cylinder.vtp
      CustomJoint jL1T12_rotx: parent_body=L3 location_in_parent=(0 0 0.09093) location=(0 0 0)
        Coordinate jL1T12_rotx: motion_type=rotational default_value=0 range=(-1.570796 1.570796) clamped=false
        SpatialTransform:
          TransformAxis rotation1: coordinates=jL1T12_rotx axis=(1 0 0) LinearFunction(coefficients=1 0)
          # 3 Axes for translations are listed next.
    Body T12_f2: mass=0 meshes=cylinder.vtp
      CustomJoint jL1T12_roty: parent_body=T12_f1 location_in_parent=(0 0 0) location=(0 0 0)
        Coordinate jL1T12_roty: motion_type=rotational default_value=0 range=(-1.570796 1.570796) clamped=false
        SpatialTransform:
          TransformAxis rotation2: coordinates=jL1T12_roty axis=(0 1 0) LinearFunction(coefficients=1 0)
          # 3 Axes for translations are listed next.
    Body T12: mass=6.3306 mass_center=(0 0 0.045465) inertia_xx=0.044087 inertia_yy=0.032819 inertia_zz=0.067244
        meshes=cylinder.vtp
      CustomJoint jL1T12_rotz: parent_body=T12_f2 location_in_parent=(0 0 0) location=(0 0 0)
        Coordinate jL1T12_rotz: motion_type=rotational default_value=0 range=(-1.570796 1.570796) clamped=false
        SpatialTransform:
          TransformAxis rotation3: coordinates=jL1T12_rotz axis=(0 0 1) LinearFunction(coefficients=1 0)
          # 3 Axes for translations are listed next.
    Body T8_f1: mass=0 meshes=cylinder.vtp
      CustomJoint jT9T8_rotx: parent_body=T12 location_in_parent=(0 0 0.09093) location=(0 0 0)
        Coordinate jT9T8_rotx: motion_type=rotational default_value=0 range=(-1.570796 1.570796) clamped=false
        SpatialTransform:
          TransformAxis rotation1: coordinates=jT9T8_rotx axis=(1 0 0) LinearFunction(coefficients=1 0)
          # 3 Axes for translations are listed next.
    Body T8_f2: mass=0 meshes=cylinder.vtp
      CustomJoint jT9T8_roty: parent_body=T8_f1 location_in_parent=(0 0 0) location=(0 0 0)
        Coordinate jT9T8_roty: motion_type=rotational default_value=0 range=(-1.570796 1.570796) clamped=false
        SpatialTransform:
          TransformAxis rotation2: coordinates=jT9T8_roty axis=(0 1 0) LinearFunction(coefficients=1 0)
          # 3 Axes for translations are listed next.
    Body T8: mass=2.4826 mass_center=(0 0 0.062885) inertia_xx=0.003843 inertia_yy=0.00723 inertia_zz=0.0045281
        meshes=box.vtp
      CustomJoint jT9T8_rotz: parent_body=T8_f2 location_in_parent=(0 0 0) location=(0 0 0)
        Coordinate jT9T8_rotz: motion_type=rotational default_value=0 range=(-1.570796 1.570796) clamped=false
        SpatialTransform:
          TransformAxis rotation3: coordinates=jT9T8_rotz axis=(0 0 1) LinearFunction(coefficients=1 0)
          # 3 Axes for translations are listed next.
    Body Neck_f1: mass=0 meshes=cylinder.vtp
      CustomJoint jT1C7_rotx: parent_body=T8 location_in_parent=(0 0 0.12577) location=(0 0 0)
        Coordinate jT1C7_rotx: motion_type=rotational default_value=0 range=(-1.570796 1.570796) clamped=false
        SpatialTransform:
          TransformAxis rotation1: coordinates=jT1C7_rotx axis=(1 0 0) LinearFunction(coefficients=1 0)
          # 3 Axes for translations are listed next.
    Body Neck_f2: mass=0 meshes=cylinder.vtp
      CustomJoint jT1C7_roty: parent_body=Neck_f1 location_in_parent=(0 0 0) location=(0 0 0)
        Coordinate jT1C7_roty: motion_type=rotational default_value=0 range=(-1.570796 1.570796) clamped=false
        SpatialTransform:
          TransformAxis rotation2: coordinates=jT1C7_roty axis=(0 1 0) LinearFunction(coefficients=1 0)
          # 3 Axes for translations are listed next.
    Body Neck: mass=0.74478 mass_center=(0 0 0.042348) inertia_xx=0.00058579 inertia_yy=0.00058579
        inertia_zz=0.00028115 meshes=cylinder.vtp
      CustomJoint jT1C7_rotz: parent_body=Neck_f2 location_in_parent=(0 0 0) location=(0 0 0)
        Coordinate jT1C7_rotz: motion_type=rotational default_value=0 range=(-1.570796 1.570796) clamped=false
        SpatialTransform:
          TransformAxis rotation3: coordinates=jT1C7_rotz axis=(0 0 1) LinearFunction(coefficients=1 0)
          # 3 Axes for translations are listed next.
    Body Head_f1: mass=0 meshes=sphere.vtp
      CustomJoint jC1Head_rotx: parent_body=Neck location_in_parent=(0.000323 0 0.084696) location=(0 0 0)
        Coordinate jC1Head_rotx: motion_type=rotational default_value=0 range=(-1.570796 1.570796) clamped=false
        SpatialTransform:
          TransformAxis rotation1: coordinates=jC1Head_rotx axis=(1 0 0) LinearFunction(coefficients=1 0)
          # 3 Axes for translations are listed next.
    Body Head_f2: mass=0 meshes=sphere.vtp
      CustomJoint jC1Head_roty: parent_body=Head_f1 location_in_parent=(0 0 0) location=(0 0 0)
        Coordinate jC1Head_roty: motion_type=rotational default_value=0 range=(-1.570796 1.570796) clamped=false
        SpatialTransform:
          TransformAxis rotation2: coordinates=jC1Head_roty axis=(0 1 0) LinearFunction(coefficients=1 0)
          # 3 Axes for translations are listed next.
    Body Head: mass=2.2343 mass_center=(0 0 0.042348) inertia_xx=0.0058193 inertia_yy=0.0058193 inertia_zz=0.0058193
        meshes=sphere.vtp
      CustomJoint jC1Head_rotz: parent_body=Head_f2 location_in_parent=(0 0 0) location=(0 0 0)
        Coordinate jC1Head_rotz: motion_type=rotational default_value=0 range=(-1.570796 1.570796) clamped=false
        SpatialTransform:
          TransformAxis rotation3: coordinates=jC1Head_rotz axis=(0 0 1) LinearFunction(coefficients=1 0)
          # 3 Axes for translations are listed next.
    # Chain from (8) to (11)
    Body RightShoulder_f1: mass=0 meshes=cylinder.vtp
      CustomJoint jRightC7Shoulder_rotx: parent_body=T8 location_in_parent=(0 -0.026257 0.070261) location=(0 0 0)
        Coordinate jRightC7Shoulder_rotx: motion_type=rotational default_value=0 range=(-1.570796 1.570796)
            clamped=false
        SpatialTransform:
          TransformAxis rotation1: coordinates=jRightC7Shoulder_rotx axis=(1 0 0) LinearFunction(coefficients=1 0)
          # 3 Axes for translations are listed next.
    Body RightShoulder_f2: mass=0 meshes=cylinder.vtp
      CustomJoint jRightC7Shoulder_roty: parent_body=RightShoulder_f1 location_in_parent=(0 0 0) location=(0 0 0)
        Coordinate jRightC7Shoulder_roty: motion_type=rotational default_value=0 range=(-1.570796 1.570796)
            clamped=false
        SpatialTransform:
          TransformAxis rotation2: coordinates=jRightC7Shoulder_roty axis=(0 1 0) LinearFunction(coefficients=1 0)
          # 3 Axes for translations are listed next.
    Body RightShoulder: mass=1.924 mass_center=(0 -0.063159 0) inertia_xx=0.00281 inertia_yy=0.00050334
        inertia_zz=0.00281 meshes=cylinder.vtp
      CustomJoint jRightC7Shoulder_rotz: parent_body=RightShoulder_f2 location_in_parent=(0 0 0) location=(0 0 0)
        Coordinate jRightC7Shoulder_rotz: motion_type=rotational default_value=0 range=(-1.570796 1.570796)
            clamped=false
        SpatialTransform:
          TransformAxis rotation3: coordinates=jRightC7Shoulder_rotz axis=(0 0 1) LinearFunction(coefficients=1 0)
          # 3 Axes for translations are listed next.
    Body RightUpperArm_f1: mass=0 meshes=cylinder.vtp
      CustomJoint jRightShoulder_rotx: parent_body=RightShoulder location_in_parent=(0 -0.12632 0) location=(0 0 0)
        Coordinate jRightShoulder_rotx: motion_type=rotational default_value=0 range=(-1.570796 1.570796) clamped=false
        SpatialTransform:
          TransformAxis rotation1: coordinates=jRightShoulder_rotx axis=(1 0 0) LinearFunction(coefficients=1 0)
          # 3 Axes for translations are listed next.
    Body RightUpperArm_f2: mass=0 meshes=cylinder.vtp
      CustomJoint jRightShoulder_roty: parent_body=RightUpperArm_f1 location_in_parent=(0 0 0) location=(0 0 0)
        Coordinate jRightShoulder_roty: motion_type=rotational default_value=0 range=(-1.570796 1.570796) clamped=false
        SpatialTransform:
          TransformAxis rotation2: coordinates=jRightShoulder_roty axis=(0 1 0) LinearFunction(coefficients=1 0)
          # 3 Axes for translations are listed next.
    Body RightUpperArm: mass=1.8619 mass_center=(0 -0.14042 0) inertia_xx=0.01267 inertia_yy=0.01267
        inertia_zz=0.00086624 meshes=cylinder.vtp
      CustomJoint jRightShoulder_rotz: parent_body=RightUpperArm_f2 location_in_parent=(0 0 0) location=(0 0 0)
        Coordinate jRightShoulder_rotz: motion_type=rotational default_value=0 range=(-1.570796 1.570796) clamped=false
        SpatialTransform:
          TransformAxis rotation3: coordinates=jRightShoulder_rotz axis=(0 0 1) LinearFunction(coefficients=1 0)
          # 3 Axes for translations are listed next.
    Body RightForeArm_f1: mass=0 meshes=cylinder.vtp
      CustomJoint jRightElbow_rotx: parent_body=RightUpperArm location_in_parent=(0 -0.28083 0) location=(0 0 0)
        Coordinate jRightElbow_rotx: motion_type=rotational default_value=0 range=(-1.570796 1.570796) clamped=false
        SpatialTransform:
          TransformAxis rotation1: coordinates=jRightElbow_rotx axis=(1 0 0) LinearFunction(coefficients=1 0)
          # 3 Axes for translations are listed next.
    Body RightForeArm_f2: mass=0 meshes=cylinder.vtp
      CustomJoint jRightElbow_roty: parent_body=RightForeArm_f1 location_in_parent=(0 0 0) location=(0 0 0)
        Coordinate jRightElbow_roty: motion_type=rotational default_value=0 range=(-1.570796 1.570796) clamped=false
        SpatialTransform:
          TransformAxis rotation2: coordinates=jRightElbow_roty axis=(0 1 0) LinearFunction(coefficients=1 0)
          # 3 Axes for translations are listed next.
    Body RightForeArm: mass=1.2413 mass_center=(0 -0.11509 0) inertia_xx=0.005609 inertia_yy=0.005609
        inertia_zz=0.00025666 meshes=cylinder.vtp
      CustomJoint jRightElbow_rotz: parent_body=RightForeArm_f2 location_in_parent=(0 0 0) location=(0 0 0)
        Coordinate jRightElbow_rotz: motion_type=rotational default_value=0 range=(-1.570796 1.570796) clamped=false
        SpatialTransform:
          TransformAxis rotation3: coordinates=jRightElbow_rotz axis=(0 0 1) LinearFunction(coefficients=1 0)
          # 3 Axes for translations are listed next.
    Body RightHand_f1: mass=0 meshes=box.vtp
      CustomJoint jRightWrist_rotx: parent_body=RightForeArm location_in_parent=(3e-5 -0.23018 0) location=(0 0 0)
        Coordinate jRightWrist_rotx: motion_type=rotational default_value=0 range=(-1.570796 1.570796) clamped=false
        SpatialTransform:
          TransformAxis rotation1: coordinates=jRightWrist_rotx axis=(1 0 0) LinearFunction(coefficients=1 0)
          # 3 Axes for translations are listed next.
    Body RightHand_f2: mass=0 meshes=box.vtp
      CustomJoint jRightWrist_roty: parent_body=RightHand_f1 location_in_parent=(0 0 0) location=(0 0 0)
        Coordinate jRightWrist_roty: motion_type=rotational default_value=0 range=(-1.570796 1.570796) clamped=false
        SpatialTransform:
          TransformAxis rotation2: coordinates=jRightWrist_roty axis=(0 1 0) LinearFunction(coefficients=1 0)
          # 3 Axes for translations are listed next.
    Body RightHand: mass=0.37239 mass_center=(0 -0.086033 0) inertia_xx=0.00097011 inertia_yy=0.00045968
        inertia_zz=0.0013271 meshes=box.vtp
      CustomJoint jRightWrist_rotz: parent_body=RightHand_f2 location_in_parent=(0 0 0) location=(0 0 0)
        Coordinate jRightWrist_rotz: motion_type=rotational default_value=0 range=(-1.570796 1.570796) clamped=false
        SpatialTransform:
          TransformAxis rotation3: coordinates=jRightWrist_rotz axis=(0 0 1) LinearFunction(coefficients=1 0)
          # 3 Axes for translations are listed next.
    # Chain from (12) to (15)
    Body LeftShoulder_f1: mass=0 meshes=cylinder.vtp
      CustomJoint jLeftC7Shoulder_rotx: parent_body=T8 location_in_parent=(0 0.026257 0.070261) location=(0 0 0)
        Coordinate jLeftC7Shoulder_rotx: motion_type=rotational default_value=0 range=(-1.570796 1.570796)
            clamped=false
        SpatialTransform:
          TransformAxis rotation1: coordinates=jLeftC7Shoulder_rotx axis=(1 0 0) LinearFunction(coefficients=1 0)
          # 3 Axes for translations are listed next.
    Body LeftShoulder_f2: mass=0 meshes=cylinder.vtp
      CustomJoint jLeftC7Shoulder_roty: parent_body=LeftShoulder_f1 location_in_parent=(0 0 0) location=(0 0 0)
        Coordinate jLeftC7Shoulder_roty: motion_type=rotational default_value=0 range=(-1.570796 1.570796)
            clamped=false
        SpatialTransform:
          TransformAxis rotation2: coordinates=jLeftC7Shoulder_roty axis=(0 1 0) LinearFunction(coefficients=1 0)
          # 3 Axes for translations are listed next.
    Body LeftShoulder: mass=1.924 mass_center=(0 0.063159 0) inertia_xx=0.00281 inertia_yy=0.00050334
        inertia_zz=0.00281 meshes=cylinder.vtp
      CustomJoint jLeftC7Shoulder_rotz: parent_body=LeftShoulder_f2 location_in_parent=(0 0 0) location=(0 0 0)
        Coordinate jLeftC7Shoulder_rotz: motion_type=rotational default_value=0 range=(-1.570796 1.570796)
            clamped=false
        SpatialTransform:
          TransformAxis rotation3: coordinates=jLeftC7Shoulder_rotz axis=(0 0 1) LinearFunction(coefficients=1 0)
          # 3 Axes for translations are listed next.
    Body LeftUpperArm_f1: mass=0 meshes=cylinder.vtp
      CustomJoint jLeftShoulder_rotx: parent_body=LeftShoulder location_in_parent=(0 0.12632 0) location=(0 0 0)
        Coordinate jLeftShoulder_rotx: motion_type=rotational default_value=0 range=(-1.570796 1.570796) clamped=false
        SpatialTransform:
          TransformAxis rotation1: coordinates=jLeftShoulder_rotx axis=(1 0 0) LinearFunction(coefficients=1 0)
          # 3 Axes for translations are listed next.
    Body LeftUpperArm_f2: mass=0 meshes=cylinder.vtp
      CustomJoint jLeftShoulder_roty: parent_body=LeftUpperArm_f1 location_in_parent=(0 0 0) location=(0 0 0)
        Coordinate jLeftShoulder_roty: motion_type=rotational default_value=0 range=(-1.570796 1.570796) clamped=false
        SpatialTransform:
          TransformAxis rotation2: coordinates=jLeftShoulder_roty axis=(0 1 0) LinearFunction(coefficients=1 0)
          # 3 Axes for translations are listed next.
    Body LeftUpperArm: mass=1.8619 mass_center=(0 0.14042 0) inertia_xx=0.01267 inertia_yy=0.01267
        inertia_zz=0.00086624 meshes=cylinder.vtp
      CustomJoint jLeftShoulder_rotz: parent_body=LeftUpperArm_f2 location_in_parent=(0 0 0) location=(0 0 0)
        Coordinate jLeftShoulder_rotz: motion_type=rotational default_value=0 range=(-1.570796 1.570796) clamped=false
        SpatialTransform:
          TransformAxis rotation3: coordinates=jLeftShoulder_rotz axis=(0 0 1) LinearFunction(coefficients=1 0)
          # 3 Axes for translations are listed next.
    Body LeftForeArm_f1: mass=0 meshes=cylinder.vtp
      CustomJoint jLeftElbow_rotx: parent_body=LeftUpperArm location_in_parent=(0 0.28083 0) location=(0 0 0)
        Coordinate jLeftElbow_rotx: motion_type=rotational default_value=0 range=(-1.570796 1.570796) clamped=false
        SpatialTransform:
          TransformAxis rotation1: coordinates=jLeftElbow_rotx axis=(1 0 0) LinearFunction(coefficients=1 0)
          # 3 Axes for translations are listed next.
    Body LeftForeArm_f2: mass=0 meshes=cylinder.vtp
      CustomJoint jLeftElbow_roty: parent_body=LeftForeArm_f1 location_in_parent=(0 0 0) location=(0 0 0)
        Coordinate jLeftElbow_roty: motion_type=rotational default_value=0 range=(-1.570796 1.570796) clamped=false
        SpatialTransform:
          TransformAxis rotation2: coordinates=jLeftElbow_roty axis=(0 1 0) LinearFunction(coefficients=1 0)
          # 3 Axes for translations are listed next.
    Body LeftForeArm: mass=1.2413 mass_center=(0 0.11509 0) inertia_xx=0.005609 inertia_yy=0.005609
        inertia_zz=0.00025666 meshes=cylinder.vtp
      CustomJoint jLeftElbow_rotz: parent_body=LeftForeArm_f2 location_in_parent=(0 0 0) location=(0 0 0)
        Coordinate jLeftElbow_rotz: motion_type=rotational default_value=0 range=(-1.570796 1.570796) clamped=false
        SpatialTransform:
          TransformAxis rotation3: coordinates=jLeftElbow_rotz axis=(0 0 1) LinearFunction(coefficients=1 0)
          # 3 Axes for translations are listed next.
    Body LeftHand_f1: mass=0 meshes=box.vtp
      CustomJoint jLeftWrist_rotx: parent_body=LeftForeArm location_in_parent=(3e-5 0.23018 0) location=(0 0 0)
        Coordinate jLeftWrist_rotx: motion_type=rotational default_value=0 range=(-1.570796 1.570796) clamped=false
        SpatialTransform:
          TransformAxis rotation1: coordinates=jLeftWrist_rotx axis=(1 0 0) LinearFunction(coefficients=1 0)
          # 3 Axes for translations are listed next.
    Body LeftHand_f2: mass=0 meshes=box.vtp
      CustomJoint jLeftWrist_roty: parent_body=LeftHand_f1 location_in_parent=(0 0 0) location=(0 0 0)
        Coordinate jLeftWrist_roty: motion_type=rotational default_value=0 range=(-1.570796 1.570796) clamped=false
        SpatialTransform:
          TransformAxis rotation2: coordinates=jLeftWrist_roty axis=(0 1 0) LinearFunction(coefficients=1 0)
          # 3 Axes for translations are listed next.
    Body LeftHand: mass=0.37239 mass_center=(0 0.086033 0) inertia_xx=0.00097011 inertia_yy=0.00045968
        inertia_zz=0.0013271 meshes=box.vtp
      CustomJoint jLeftWrist_rotz: parent_body=LeftHand_f2 location_in_parent=(0 0 0) location=(0 0 0)
        Coordinate jLeftWrist_rotz: motion_type=rotational default_value=0 range=(-1.570796 1.570796) clamped=false
        SpatialTransform:
          TransformAxis rotation3: coordinates=jLeftWrist_rotz axis=(0 0 1) LinearFunction(coefficients=1 0)
          # 3 Axes for translations are listed next.
    # Chain from (16) to (19)
    Body RightUpperLeg_f1: mass=0 meshes=cylinder.vtp
      CustomJoint jRightHip_rotx: parent_body=Pelvis location_in_parent=(3.7e-5 -0.079215 0.000367) location=(0 0 0)
        Coordinate jRightHip_rotx: motion_type=rotational default_value=0 range=(-1.570796 1.570796) clamped=false
        SpatialTransform:
          TransformAxis rotation1: coordinates=jRightHip_rotx axis=(1 0 0) LinearFunction(coefficients=1 0)
          # 3 Axes for translations are listed next.
    Body RightUpperLeg_f2: mass=0 meshes=cylinder.vtp
      CustomJoint jRightHip_roty: parent_body=RightUpperLeg_f1 location_in_parent=(0 0 0) location=(0 0 0)
        Coordinate jRightHip_roty: motion_type=rotational default_value=0 range=(-1.570796 1.570796) clamped=false
        SpatialTransform:
          TransformAxis rotation2: coordinates=jRightHip_roty axis=(0 1 0) LinearFunction(coefficients=1 0)
          # 3 Axes for translations are listed next.
    Body RightUpperLeg: mass=7.7581 mass_center=(0 0 -0.20463) inertia_xx=0.11345 inertia_yy=0.11345
        inertia_zz=0.010326 meshes=cylinder.vtp
      CustomJoint jRightHip_rotz: parent_body=RightUpperLeg_f2 location_in_parent=(0 0 0) location=(0 0 0)
        Coordinate jRightHip_rotz: motion_type=rotational default_value=0 range=(-1.570796 1.570796) clamped=false
        SpatialTransform:
          TransformAxis rotation3: coordinates=jRightHip_rotz axis=(0 0 1) LinearFunction(coefficients=1 0)
          # 3 Axes for translations are listed next.
    Body RightLowerLeg_f1: mass=0 meshes=cylinder.vtp
      CustomJoint jRightKnee_rotx: parent_body=RightUpperLeg location_in_parent=(-2e-6 0 -0.40926) location=(0 0 0)
        Coordinate jRightKnee_rotx: motion_type=rotational default_value=0 range=(-1.570796 1.570796) clamped=false
        SpatialTransform:
          TransformAxis rotation1: coordinates=jRightKnee_rotx axis=(1 0 0) LinearFunction(coefficients=1 0)
          # 3 Axes for translations are listed next.
    Body RightLowerLeg_f2: mass=0 meshes=cylinder.vtp
      CustomJoint jRightKnee_roty: parent_body=RightLowerLeg_f1 location_in_parent=(0 0 0) location=(0 0 0)
        Coordinate jRightKnee_roty: motion_type=rotational default_value=0 range=(-1.570796 1.570796) clamped=false
        SpatialTransform:
          TransformAxis rotation2: coordinates=jRightKnee_roty axis=(0 1 0) LinearFunction(coefficients=1 0)
          # 3 Axes for translations are listed next.
    Body RightLowerLeg: mass=2.2654 mass_center=(0 0 -0.21406) inertia_xx=0.035474 inertia_yy=0.035474
        inertia_zz=0.0017488 meshes=cylinder.vtp
      CustomJoint jRightKnee_rotz: parent_body=RightLowerLeg_f2 location_in_parent=(0 0 0) location=(0 0 0)
        Coordinate jRightKnee_rotz: motion_type=rotational default_value=0 range=(-1.570796 1.570796) clamped=false
        SpatialTransform:
          TransformAxis rotation3: coordinates=jRightKnee_rotz axis=(0 0 1) LinearFunction(coefficients=1 0)
          # 3 Axes for translations are listed next.
    Body RightFoot_f1: mass=0 meshes=cylinder.vtp
      CustomJoint jRightAnkle_rotx: parent_body=RightLowerLeg location_in_parent=(-0.000373 0 -0.42811)
          location=(0 0 0)
        Coordinate jRightAnkle_rotx: motion_type=rotational default_value=0 range=(-1.570796 1.570796) clamped=false
        SpatialTransform:
          TransformAxis rotation1: coordinates=jRightAnkle_rotx axis=(1 0 0) LinearFunction(coefficients=1 0)
          # 3 Axes for translations are listed next.
    Body RightFoot_f2: mass=0 meshes=cylinder.vtp
      CustomJoint jRightAnkle_roty: parent_body=RightFoot_f1 location_in_parent=(0 0 0) location=(0 0 0)
        Coordinate jRightAnkle_roty: motion_type=rotational default_value=0 range=(-1.570796 1.570796) clamped=false
        SpatialTransform:
          TransformAxis rotation2: coordinates=jRightAnkle_roty axis=(0 1 0) LinearFunction(coefficients=1 0)
          # 3 Axes for translations are listed next.
    Body RightFoot: mass=0.80684 mass_center=(0.047341 0 -0.045923) inertia_xx=0.00098245 inertia_yy=0.0025999
        inertia_zz=0.0024479 meshes=box.vtp
      CustomJoint jRightAnkle_rotz: parent_body=RightFoot_f2 location_in_parent=(0 0 0) location=(0 0 0)
        Coordinate jRightAnkle_rotz: motion_type=rotational default_value=0 range=(-1.570796 1.570796) clamped=false
        SpatialTransform:
          TransformAxis rotation3: coordinates=jRightAnkle_rotz axis=(0 0 1) LinearFunction(coefficients=1 0)
          # 3 Axes for translations are listed next.
    Body RightToe_f1: mass=0 meshes=cylinder.vtp
      CustomJoint jRightBallFoot_rotx: parent_body=RightFoot location_in_parent=(0.13428 0 -0.078689) location=(0 0 0)
        Coordinate jRightBallFoot_rotx: motion_type=rotational default_value=0 range=(-1.570796 1.570796) clamped=false
        SpatialTransform:
          TransformAxis rotation1: coordinates=jRightBallFoot_rotx axis=(1 0 0) LinearFunction(coefficients=1 0)
          # 3 Axes for translations are listed next.
    Body RightToe_f2: mass=0 meshes=cylinder.vtp
      CustomJoint jRightBallFoot_roty: parent_body=RightToe_f1 location_in_parent=(0 0 0) location=(0 0 0)
        Coordinate jRightBallFoot_roty: motion_type=rotational default_value=0 range=(-1.570796 1.570796) clamped=false
        SpatialTransform:
          TransformAxis rotation2: coordinates=jRightBallFoot_roty axis=(0 1 0) LinearFunction(coefficients=1 0)
          # 3 Axes for translations are listed next.
    Body RightToe: mass=0.093097 mass_center=(0.033062 0 0) inertia_xx=4.9587e-5 inertia_yy=3.5594e-5
        inertia_zz=8.1834e-5 meshes=box.vtp
      CustomJoint jRightBallFoot_rotz: parent_body=RightToe_f2 location_in_parent=(0 0 0) location=(0 0 0)
        Coordinate jRightBallFoot_rotz: motion_type=rotational default_value=0 range=(-1.570796 1.570796) clamped=false
        SpatialTransform:
          TransformAxis rotation3: coordinates=jRightBallFoot_rotz axis=(0 0 1) LinearFunction(coefficients=1 0)
          # 3 Axes for translations are listed next.
    # Chain from (20) to (23)
    Body LeftUpperLeg_f1: mass=0 meshes=cylinder.vtp
      CustomJoint jLeftHip_rotx: parent_body=Pelvis location_in_parent=(3.7e-5 0.079215 0.000367) location=(0 0 0)
        Coordinate jLeftHip_rotx: motion_type=rotational default_value=0 range=(-1.570796 1.570796) clamped=false
        SpatialTransform:
          TransformAxis rotation1: coordinates=jLeftHip_rotx axis=(1 0 0) LinearFunction(coefficients=1 0)
          # 3 Axes for translations are listed next.
    Body LeftUpperLeg_f2: mass=0 meshes=cylinder.vtp
      CustomJoint jLeftHip_roty: parent_body=LeftUpperLeg_f1 location_in_parent=(0 0 0) location=(0 0 0)
        Coordinate jLeftHip_roty: motion_type=rotational default_value=0 range=(-1.570796 1.570796) clamped=false
        SpatialTransform:
          TransformAxis rotation2: coordinates=jLeftHip_roty axis=(0 1 0) LinearFunction(coefficients=1 0)
          # 3 Axes for translations are listed next.
    Body LeftUpperLeg: mass=7.7581 mass_center=(0 0 -0.20463) inertia_xx=0.11345 inertia_yy=0.11345 inertia_zz=0.010326
        meshes=cylinder.vtp
      CustomJoint jLeftHip_rotz: parent_body=LeftUpperLeg_f2 location_in_parent=(0 0 0) location=(0 0 0)
        Coordinate jLeftHip_rotz: motion_type=rotational default_value=0 range=(-1.570796 1.570796) clamped=false
        SpatialTransform:
          TransformAxis rotation3: coordinates=jLeftHip_rotz axis=(0 0 1) LinearFunction(coefficients=1 0)
          # 3 Axes for translations are listed next.
    Body LeftLowerLeg_f1: mass=0 meshes=cylinder.vtp
      CustomJoint jLeftKnee_rotx: parent_body=LeftUpperLeg location_in_parent=(-2e-6 0 -0.40926) location=(0 0 0)
        Coordinate jLeftKnee_rotx: motion_type=rotational default_value=0 range=(-1.570796 1.570796) clamped=false
        SpatialTransform:
          TransformAxis rotation1: coordinates=jLeftKnee_rotx axis=(1 0 0) LinearFunction(coefficients=1 0)
          # 3 Axes for translations are listed next.
    Body LeftLowerLeg_f2: mass=0 meshes=cylinder.vtp
      CustomJoint jLeftKnee_roty: parent_body=LeftLowerLeg_f1 location_in_parent=(0 0 0) location=(0 0 0)
        Coordinate jLeftKnee_roty: motion_type=rotational default_value=0 range=(-1.570796 1.570796) clamped=false
        SpatialTransform:
          TransformAxis rotation2: coordinates=jLeftKnee_roty axis=(0 1 0) LinearFunction(coefficients=1 0)
          # 3 Axes for translations are listed next.
    Body LeftLowerLeg: mass=2.2654 mass_center=(0 0 -0.21406) inertia_xx=0.035474 inertia_yy=0.035474
        inertia_zz=0.0017488 meshes=cylinder.vtp
      CustomJoint jLeftKnee_rotz: parent_body=LeftLowerLeg_f2 location_in_parent=(0 0 0) location=(0 0 0)
        Coordinate jLeftKnee_rotz: motion_type=rotational default_value=0 range=(-1.570796 1.570796) clamped=false
        SpatialTransform:
          TransformAxis rotation3: coordinates=jLeftKnee_rotz axis=(0 0 1) LinearFunction(coefficients=1 0)
          # 3 Axes for translations are listed next.
    Body LeftFoot_f1: mass=0 meshes=cylinder.vtp
      CustomJoint jLeftAnkle_rotx: parent_body=LeftLowerLeg location_in_parent=(-0.000373 0 -0.42811) location=(0 0 0)
        Coordinate jLeftAnkle_rotx: motion_type=rotational default_value=0 range=(-1.570796 1.570796) clamped=false
        SpatialTransform:
          TransformAxis rotation1: coordinates=jLeftAnkle_rotx axis=(1 0 0) LinearFunction(coefficients=1 0)
          # 3 Axes for translations are listed next.
    Body LeftFoot_f2: mass=0 meshes=cylinder.vtp
      CustomJoint jLeftAnkle_roty: parent_body=LeftFoot_f1 location_in_parent=(0 0 0) location=(0 0 0)
        Coordinate jLeftAnkle_roty: motion_type=rotational default_value=0 range=(-1.570796 1.570796) clamped=false
        SpatialTransform:
          TransformAxis rotation2: coordinates=jLeftAnkle_roty axis=(0 1 0) LinearFunction(coefficients=1 0)
          # 3 Axes for translations are listed next.
    Body LeftFoot: mass=0.80684 mass_center=(0.047341 0 -0.045923) inertia_xx=0.00098245 inertia_yy=0.0025999
        inertia_zz=0.0024479 meshes=box.vtp
      CustomJoint jLeftAnkle_rotz: parent_body=LeftFoot_f2 location_in_parent=(0 0 0) location=(0 0 0)
        Coordinate jLeftAnkle_rotz: motion_type=rotational default_value=0 range=(-1.570796 1.570796) clamped=false
        SpatialTransform:
          TransformAxis rotation3: coordinates=jLeftAnkle_rotz axis=(0 0 1) LinearFunction(coefficients=1 0)
          # 3 Axes for translations are listed next.
    Body LeftToe_f1: mass=0 meshes=cylinder.vtp
      CustomJoint jLeftBallFoot_rotx: parent_body=LeftFoot location_in_parent=(0.13428 0 -0.078689) location=(0 0 0)
        Coordinate jLeftBallFoot_rotx: motion_type=rotational default_value=0 range=(-1.570796 1.570796) clamped=false
        SpatialTransform:
          TransformAxis rotation1: coordinates=jLeftBallFoot_rotx axis=(1 0 0) LinearFunction(coefficients=1 0)
          # 3 Axes for translations are listed next.
    Body LeftToe_f2: mass=0 meshes=cylinder.vtp
      CustomJoint jLeftBallFoot_roty: parent_body=LeftToe_f1 location_in_parent=(0 0 0) location=(0 0 0)
        Coordinate jLeftBallFoot_roty: motion_type=rotational default_value=0 range=(-1.570796 1.570796) clamped=false
        SpatialTransform:
          TransformAxis rotation2: coordinates=jLeftBallFoot_roty axis=(0 1 0) LinearFunction(coefficients=1 0)
          # 3 Axes for translations are listed next.
    Body LeftToe: mass=0.093097 mass_center=(0.033062 0 0) inertia_xx=4.9587e-5 inertia_yy=3.5594e-5
        inertia_zz=8.1834e-5 meshes=box.vtp
      CustomJoint jLeftBallFoot_rotz: parent_body=LeftToe_f2 location_in_parent=(0 0 0) location=(0 0 0)
        Coordinate jLeftBallFoot_rotz: motion_type=rotational default_value=0 range=(-1.570796 1.570796) clamped=false
        SpatialTransform:
          TransformAxis rotation3: coordinates=jLeftBallFoot_rotz axis=(0 0 1) LinearFunction(coefficients=1 0)
          # 3 Axes for translations are listed next.
  MarkerSet:
    Marker pHipOrigin: Pelvis (0 0 0)
    Marker pRightASI: Pelvis (0.067046 -0.1198 0.07179)
    Marker pLeftASI: Pelvis (0.067046 0.1198 0.07179)
    Marker pRightCSI: Pelvis (0.034679 -0.099019 0.14477)
    Marker pLeftCSI: Pelvis (0.034679 0.099019 0.14477)
    Marker pRightIschialTub: Pelvis (-0.05438 -0.04951 -0.045213)
    Marker pLeftIschialTub: Pelvis (-0.05438 0.04951 -0.045213)
    Marker pSacrum: Pelvis (-0.067046 0 0.025753)
    Marker pL5SpinalProcess: L5 (-0.028055 0 -0.003338)
    Marker pL3SpinalProcess: L3 (-0.028287 0 -0.000737)
    Marker pT12SpinalProcess: T12 (-0.028287 0 -0.000737)
    Marker pPX: T8 (0.11065 0 -0.003503)
    Marker pIJ: T8 (0.10604 0 0.10714)
    Marker pT4SpinalProcess: T8 (-0.027662 0 0.080404)
    Marker pT8SpinalProcess: T8 (-0.027662 0 -0.000737)
    Marker pC7SpinalProcess: T8 (-0.027662 0 0.12651)
    Marker pTopOfHead: Head (0.000169 0 0.16139)
    Marker pRightAuricularis: Head (-0.005704 -0.065269 0.064952)
    Marker pLeftAuricularis: Head (-0.005704 0.065269 0.064952)
    Marker pBackOfHead: Head (-0.055624 0 0.053206)
    Marker pRightAcromion: RightShoulder (0 -0.14395 0.045748)
    Marker pRightArmLatEpicondyle: RightUpperArm (0 -0.2812 0.028157)
    Marker pRightArmMedEpicondyle: RightUpperArm (0 -0.2812 -0.03285)
    Marker pRightUlnarStyloid: RightForeArm (-0.023509 -0.22959 0)
    Marker pRightRadialStyloid: RightForeArm (0.023539 -0.23151 0)
    Marker pRightOlecranon: RightForeArm (-0.023509 0.001329 0)
    Marker pRightTopOfHand: RightHand (0 -0.17207 0)
    Marker pRightPinky: RightHand (-0.037772 -0.098781 0)
    Marker pRightBallHand: RightHand (-0.018886 -0.032681 -0.009443)
    Marker pLeftAcromion: LeftShoulder (0 0.14395 0.045748)
    Marker pLeftArmLatEpicondyle: LeftUpperArm (0 0.2812 0.028157)
    Marker pLeftArmMedEpicondyle: LeftUpperArm (0 0.2812 -0.03285)
    Marker pLeftUlnarStyloid: LeftForeArm (-0.023509 0.22959 0)
    Marker pLeftRadialStyloid: LeftForeArm (0.023539 0.23151 0)
    Marker pLeftOlecranon: LeftForeArm (-0.023509 -0.001329 0)
    Marker pLeftTopOfHand: LeftHand (0 0.17207 0)
    Marker pLeftPinky: LeftHand (-0.037772 0.098781 0)
    Marker pLeftBallHand: LeftHand (-0.018886 0.032681 -0.009443)
    Marker pRightGreaterTrochanter: RightUpperLeg (0.001445 -0.068794 -0.029369)
    Marker pRightPatella: RightUpperLeg (0.03434 0 -0.40728)
    Marker pRightKneeLatEpicondyle: RightLowerLeg (-0.007284 -0.041913 -0.001756)
    Marker pRightKneeMedEpicondyle: RightLowerLeg (-0.007284 0.036674 -0.001756)
    Marker pRightLatMalleolus: RightLowerLeg (2.6e-5 -0.031435 -0.42694)
    Marker pRightMedMalleolus: RightLowerLeg (2.6e-5 0.031435 -0.42694)
    Marker pRightTibialTub: RightLowerLeg (0.060445 0 -0.033033)
    Marker pRightHeelFoot: RightFoot (-0.039596 0 -0.091847)
    Marker pRightFirstMetatarsal: RightFoot (0.1046 0.032462 -0.092215)
    Marker pRightFifthMetatarsal: RightFoot (0.1046 -0.034265 -0.092215)
    Marker pRightPivotFoot: RightFoot (0.12354 0 -0.092215)
    Marker pRightHeelCenter: RightFoot (0 0 -0.087661)
    Marker pRightToe: RightToe (0.066123 0 -0.014689)
    Marker pLeftGreaterTrochanter: LeftUpperLeg (0.001445 0.068794 -0.029369)
    Marker pLeftPatella: LeftUpperLeg (0.03434 0 -0.40728)
    Marker pLeftKneeLatEpicondyle: LeftLowerLeg (-0.007284 0.041913 -0.001756)
    Marker pLeftKneeMedEpicondyle: LeftLowerLeg (-0.007284 -0.036674 -0.001756)
    Marker pLeftLatMalleolus: LeftLowerLeg (2.6e-5 0.031435 -0.42694)
    Marker pLeftMedMalleolus: LeftLowerLeg (2.6e-5 -0.031435 -0.42694)
    Marker pLeftTibialTub: LeftLowerLeg (0.060445 0 -0.033033)
    Marker pLeftHeelFoot: LeftFoot (-0.039596 0 -0.091847)
    Marker pLeftFirstMetatarsal: LeftFoot (0.1046 -0.032462 -0.092215)
    Marker pLeftFifthMetatarsal: LeftFoot (0.1046 0.034265 -0.092215)
    Marker pLeftPivotFoot: LeftFoot (0.12354 0 -0.092215)
    Marker pLeftHeelCenter: LeftFoot (0 0 -0.087661)
    Marker pLeftToe: LeftToe (0.066123 0 -0.014689)
